Дано
L_bl := 0.9
L_ed := 0.963
L_ck := 3
L_ac := 1.529
θ := 0.32
L_cd := 0.3857
L_ek := 2.35
L_bc := 0.424
φ_n := -37.9121 deg
J_5 := 13250
J_4 := 40
m_5 := 7500
m_4 := 450
m_r := 2000
L_Srk := 4.608
γ := 2.6635  # - угол стойки от горизонтали
# Расчет функций координат точек
φ_1(φ) := φ_n + φ
X_d(φ) := L_cd*cos(φ_1(φ))
Y_d(φ) := L_ck*sin(γ) + L_cd*sin(φ_1(φ))
L_dk(φ) := sqrt(L_cd^2 + L_ck^2 - 2*L_cd*L_ck*cos(π - γ + φ_1(φ)))
ψ(φ) := acos((L_ek^2 + L_dk(φ)^2 - L_ed^2)/(2*L_ek*L_dk(φ)))
α(φ) := acos((L_ck^2 + L_dk(φ)^2 - L_cd^2)/(2*L_ck*L_dk(φ)))
φ_5(φ) :=
    (γ + ψ(φ) + α(φ)) if (φ ≤ -φ_n - π + γ)
    (γ + ψ(φ)) - α(φ) if φ > -φ_n - π + γ
φ_4(φ) := -π + φ_5(φ) + acos((L_ek^2 - L_dk(φ)^2 + L_ed^2)/(2*L_ek*L_ed))
X_a := 1.4508
Y_a := 1.8589
X_b(φ) := L_bc*cos(φ_1(φ) + 1.57)
Y_b(φ) := L_bc*sin(φ_1(φ) + 1.57) + L_ck*sin(γ)
X_c := 0
Y_c := L_ck*sin(γ)
X_k := -L_ck*cos(γ)
Y_k := 0
X_e(φ) := X_k + L_ek*cos(φ_5(φ))
Y_e(φ) := L_ek*sin(φ_5(φ))
X_s4(φ) := X_e(φ) - 0.5*(X_d(φ) - X_e(φ))
Y_s4(φ) := Y_e(φ) + 0.5*(Y_d(φ) - Y_e(φ))
L_ab(φ) := sqrt((X_a - X_b(φ))^2 + (Y_a - Y_b(φ))^2)
φ_2(φ) := -θ + acos((L_ac^2 + L_ab(φ)^2 - L_bc^2)/(2*L_ac*L_ab(φ)))
X_Sr(φ) := X_k + L_Srk*cos(φ_5(φ) + 0.1974)
Y_Sr(φ) := L_Srk*sin(φ_5(φ) + 0.1974)
X_f(φ) := 0.5*(X_k + X_Sr(φ))
Y_f(φ) := 0.5*Y_Sr(φ)
X_s5(φ) := X_f(φ)
Y_s5(φ) := Y_f(φ)
X_L(φ) := X_b(φ) + L_bl*cos(φ_2(φ))
Y_L(φ) := Y_b(φ) - L_bl*sin(φ_2(φ))
LA(φ) := sqrt((X_a - X_L(φ))^2 + (Y_a - Y_L(φ))^2)
f := π/4
Hl(φ) := (LA(φ) - LA(0)) - 0.00122
φ_5(f) = 2.94235
φ_2(f) = -0.0399661
X_a = 1.4508
φ_4(f) = 1.54728
X_d(f) = 0.382752
Y_a = 1.8589
X_b(f) = -0.0519831
Y_d(f) = 1.42785
X_e(f) = 0.360111
Y_b(f) = 1.80106
Y(φ) := [Y_a; Y_b(φ); Y_c; Y_d(φ); Y_e(φ); Y_k; Y_f(φ); Y_e(φ); Y_f(φ); Y_Sr(φ)]
X(φ) := [X_a; X_b(φ); X_c; X_d(φ); X_e(φ); X_k; X_f(φ); X_e(φ); X_f(φ); X_Sr(φ)]
X_s4(f) = 0.34879
Y_e(f) = 0.465118
X_s4(f) = 0.34879
Y_s5(f) = 0.00423502
X_f(f) = 0.359626
Y_s4(f) = 0.946485
X_Sr(f) = -1.94437
Y_f(f) = 0.00423502
X_k = 2.66362
Y_Sr(f) = 0.00847004
φ := 0, 0.01 .. π/2
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# Определяем аналоги скоростей
V_qbx(φ) := d/dφ(X_b(φ))
V_qby(φ) := d/dφ(Y_b(φ))  # B
А
V_qdx(φ) := d/dφ(X_d(φ))
V_qdy(φ) := d/dφ(Y_d(φ))  # C  # D
V_qex(φ) := d/dφ(X_e(φ))
V_qey(φ) := d/dφ(Y_e(φ))
S4
V_qlx(φ) := d/dφ(X_L(φ))
V_qly(φ) := d/dφ(Y_L(φ))
E
V_qex(φ) := d/dφ(X_e(φ))
V_qs4x(φ) := d/dφ(X_s4(φ))
V_qs4y(φ) := d/dφ(Y_s4(φ))
K
V_qs5x(φ) := d/dφ(X_s5(φ))
V_qs5y(φ) := d/dφ(Y_s5(φ))  # Sr  # S5
V_qsrx(φ) := d/dφ(X_Sr(φ))
V_qsry(φ) := d/dφ(Y_Sr(φ))
ω_q5(φ) := d/dφ(φ_5(φ))
ω_q4(φ) := d/dφ(φ_4(φ))
ω_q2(φ) := d/dφ(φ_2(φ))
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V_qs5(φ) := sqrt(V_qs5x(φ)^2 + V_qs5y(φ)^2)
V_qs4(φ) := sqrt(V_qs4x(φ)^2 + V_qs4y(φ)^2)
V_qsr(φ) := sqrt(V_qsrx(φ)^2 + V_qsry(φ)^2)
V_ql(φ) := sqrt(V_qlx(φ)^2 + V_qly(φ)^2)
V_qe(φ) := sqrt(V_qex(φ)^2 + V_qey(φ)^2)
V_qb(φ) := sqrt(V_qbx(φ)^2 + V_qby(φ)^2)
V_qd(φ) := sqrt(V_qdx(φ)^2 + V_qdy(φ)^2)
J_5pr(φ) := m_5*V_qs5(φ)^2 + J_5*ω_q5(φ)^2
J_rpr(φ) := m_r*V_qsr(φ)^2
J_m(φ) := J_5pr(φ) + J_5pr(φ) + J_rpr(φ)
J_4pr(φ) := m_4*V_qs4(φ)^2 + J_4*ω_q4(φ)^2
# Силы тяжести:
G4 := 9.8*m_4
G5 := 9.8*m_5
Gr := 9.8*m_r
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# Приведенные
# моменты
# сил тяжести:
M_G4pr(φ) := -G4*V_qs4y(φ)
M_G5pr(φ) := -G5*V_qs5y(φ)
M_Grpr(φ) := -Gr*V_qsry(φ)
M_Gpr(φ) := M_G4pr(φ) + M_G5pr(φ) + M_Grpr(φ)
# Находим значения функции F2:
M_F2pr_n := -1.6*(M_Grpr(0) + M_G5pr(0) + M_G4pr(0)) = 55063.7
M_F2pr_k := -(M_Grpr(π/2) + M_G5pr(π/2) + M_G4pr(π/2)) = 38554.9
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F2_n := M_F2pr_n/(V_qly(0)*sin(φ_2(0)) + V_qlx(0)*cos(π - φ_2(0))) = 183729
F2_k := M_F2pr_k/(V_qly(π/2)*sin(φ_2(π/2)) + V_qlx(π/2)*cos(π - φ_2(π/2))) = 128687
A_Gc := integral(M_Gpr(φ), φ = 0 .. π/2) = -65721.1  # -  Работа сил тяжести
F2_m := 2*(-A_Gc/0.6) - (F2_n + F2_k)/2 = 62862
# Кусочно-заданная функция  F2(φ):
F_2(φ) :=
    F2_n - (F2_n - F2_m)*Hl(φ)/0.3 if Hl(φ) ≤ 0.3
    (F2_k - F2_m)*Hl(φ)/0.3 + 2*F2_m - F2_k if Hl(φ) > 0.3
M_F2pr(φ) := F_2(φ)*V_qly(φ)*sin(φ_2(φ)) + F_2(φ)*V_qlx(φ)*cos(π - φ_2(φ))
# Суммарный приведенный момент внешних сил:
M_Σpr(φ) := M_F2pr(φ) + M_Gpr(φ)
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# Суммарная работа сил за цикл:
A_c(φ) := integral(M_Σpr(φ), φ = 0 .. φ)
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# Закон движения 1 звена
# шестизвенного механизма
# машинного агрегата
ω_1(φ) := sqrt(2*|A_c(φ)|/J_m(φ))
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# Определение аналогов ускорений
a_qBx(φ) := d^2/dφ^2(X_b(φ))
a_qBy(φ) := d^2/dφ^2(Y_b(φ))
a_qDx(φ) := d^2/dφ^2(X_d(φ))
a_qDy(φ) := d^2/dφ^2(Y_d(φ))
a_qEx(φ) := d^2/dφ^2(X_e(φ))
a_qEy(φ) := d^2/dφ^2(Y_e(φ))
a_qS5x(φ) := d^2/dφ^2(X_s5(φ))
a_qS5y(φ) := d^2/dφ^2(Y_s5(φ))
a_qS4x(φ) := d^2/dφ^2(X_s4(φ))
a_qS4y(φ) := d^2/dφ^2(Y_s4(φ))
ε_q5(φ) := d^2/dφ^2(φ_5(φ))
ε_q4(φ) := d^2/dφ^2(φ_4(φ))
ε_q2(φ) := d^2/dφ^2(φ_2(φ))
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# Определение ускорений
a_Ax(φ) := a_qAx(φ)*ω_1^2 + V_qax(φ)*ε_1
a_Ay(φ) := a_qAy(φ)*ω_1^2 + V_qay(φ)*ε_1
a_Bx(φ) := a_qBx(φ)*ω_1^2 + V_qbx(φ)*ε_1
a_By(φ) := a_qBy(φ)*ω_1^2 + V_qby(φ)*ε_1
a_Ex(φ) := a_qEx(φ)*ω_1^2 + V_qex(φ)*ε_1
a_Ey(φ) := a_qEy(φ)*ω_1^2 + V_qey(φ)*ε_1
a_Dx(φ) := a_qDx(φ)*ω_1^2 + V_qdx(φ)*ε_1
a_Dy(φ) := a_qDy(φ)*ω_1^2 + V_qdy(φ)*ε_1
a_S2x(φ) := a_qS2x(φ)*ω_1^2 + V_qs2x(φ)*ε_1
a_S2y(φ) := a_qS2y(φ)*ω_1^2 + V_qs2y(φ)*ε_1
a_S4x(φ) := a_qS4x(φ)*ω_1^2 + V_qs4x(φ)*ε_1
a_S4y(φ) := a_qS4y(φ)*ω_1^2 + V_qs4y(φ)*ε_1
ε_2(φ) := ε_q2(φ)*ω_1^2 + ω_q2(φ)*ε_1
ε_4(φ) := ε_q4(φ)*ω_1^2 + ω_q4(φ)*ε_1
ε_2(f) =  # error: Эта переменная не определена.
ε_4(f) =  # error
a_Ax(f) =  # error
a_Ay(f) =  # error
a_A := sqrt(a_Ax(f)^2 + a_Ay(f)^2)
a_Bx(f) =  # error
a_By(f) =  # error
a_B := sqrt(a_Bx(f)^2 + a_By(f)^2)
a_Ex(f) =  # error
a_Ey(f) =  # error
a_E := sqrt(a_Ex(f)^2 + a_Ey(f)^2)
a_Dx(f) =  # error
a_Dy(f) =  # error
a_D := sqrt(a_Dx(f)^2 + a_Dy(f)^2)
a_S2x(f) =  # error
a_S2y(f) =  # error
a_S2 := sqrt(a_S2x(f)^2 + a_S2y(f)^2)
a_S4x(f) =  # error
a_S4y(f) =  # error
a_S4 := sqrt(a_S4x(f)^2 + a_S4y(f)^2)
